// COMSOL Multiphysics 5.1.0.234 model "AcousticStructureInteraction_tutorial_stopat5_48.mph"
// Outline of the model tree

Parameters
  f = 40[kHz]  // Freq
  phi = (-pi/6)[rad]  // wave direction 1
  theta = (4*pi/6)[rad]  // wave direction 2
  k1 = sin(theta)*cos(phi)
  k2 = sin(theta)*sin(phi)
  k3 = cos(theta)
  R = 30[mm]

Selections
  sel1: Explicit "fluid_domain" on domains 1
  sel2: Explicit "solid_domain" on domains 2
  sel3: Explicit "rad_boundary" on boundaries adjacent to all domains
  sel4: Explicit "solid_bound" on boundaries adjacent to domains 2

Geometry
  geom1 "Geometry 1" (3D, length unit mm)
    cyl1: Cylinder | pos = {0, 0, -10}; r = 5; h = 20
    sph1: Sphere | r = R
    fin: Finalize "Form Union"

Materials
  mat1: Common "Air" on selection sel1
    def "Basic"
      relpermeability = 1
      relpermittivity = 1
      dynamicviscosity = eta(T[1/K])[Pa*s]
      ratioofspecificheat = 1.4
      electricconductivity = 0[S/m]
      heatcapacity = Cp(T[1/K])[J/(kg*K)]
      density = rho(pA[1/Pa],T[1/K])[kg/m^3]
      thermalconductivity = k(T[1/K])[W/(m*K)]
      soundspeed = cs(T[1/K])[m/s]
      eta: Piecewise | arg = T; extrap = constant; pieces = {200.0, 1600.0, -8.38278E-7+8.35717342E-8*T^1-7.69429583E-11*T^2+4.6437266E-14*T^3-1.06585607E-17*T^4}
      Cp: Piecewise | arg = T; extrap = constant; pieces = {200.0, 1600.0, 1047.63657-0.372589265*T^1+9.45304214E-4*T^2-6.02409443E-7*T^3+1.2858961E-10*T^4}
      rho: Analytic | expr = pA*0.02897/8.314/T; args = {pA, T}; dermethod = manual; argders = {{pA, d(pA*0.02897/8.314/T,pA)}, {T, d(pA*0.02897/8.314/T,T)}}
      k: Piecewise | arg = T; extrap = constant; pieces = {200.0, 1600.0, -0.00227583562+1.15480022E-4*T^1-7.90252856E-8*T^2+4.11702505E-11*T^3-7.43864331E-15*T^4}
      cs: Analytic | expr = sqrt(1.4*287*T); args = T; dermethod = manual; argders = {T, d(sqrt(1.4*287*T),T)}
    RefractiveIndex
      n = 1
      ki = 0
  mat2: Common "Aluminum 3003-H18" on selection sel2
    def "Basic"
      relpermeability = 1
      electricconductivity = 2.326e7[S/m]
      thermalexpansioncoefficient = 23.2e-6[1/K]
      heatcapacity = 893[J/(kg*K)]
      relpermittivity = 1
      density = 2730[kg/m^3]
      thermalconductivity = 155[W/(m*K)]
    Enu "Young's modulus and Poisson's ratio"
      youngsmodulus = 69e9[Pa]
      poissonsratio = 0.33

Physics
  acpr: PressureAcoustics "Pressure Acoustics, Frequency Domain" on selection sel1
    dependent variable p
    fpam1: FrequencyPressureAcousticsModel "Pressure Acoustics 1" (default)
    shb1: SoundHard "Sound Hard Boundary (Wall) 1" (default)
    init1: init "Initial Values 1" (default)
    swr1: SphericalWaveRadiation on selection sel3
      ipf1: IncidentPressureField on all boundaries | dir = {k1, k2, k3}; pamp = 1
  solid: SolidMechanics on selection sel2
    dependent variable u = {u, v, w}
    lemm1: LinearElasticModel "Linear Elastic Material 1" (default)
    free1: Free (default)
    init1: init "Initial Values 1" (default)
    fix1: Fixed "Fixed Constraint 1" on selection sel4

Multiphysics
  asb1: AcousticStructureBoundary on all boundaries | Acoustics_physics = acpr; Structure_physics = solid

Mesh
  mesh1 "Mesh 1"
    size: MeshSizeDefault | hmax = 6; hmin = 1.08; hcurve = 0.6; hnarrow = 0.5; hgrad = 1.5; hauto = 5
    ftet1: FreeTet "Free Tetrahedral 1" on no domains

Studies
  std1 "Study 1"
    freq: Frequency "Frequency Domain" | punit = Hz